<neuroml xmlns="http://www.neuroml.org/schema/neuroml2"  xmlns:xs="http://www.w3.org/2001/XMLSchema" xmlns:xsi="http://www.w3.org/2001/XMLSchema-instance" xsi:schemaLocation="http://www.neuroml.org/schema/neuroml2 https://raw.github.com/NeuroML/NeuroML2/development/Schemas/NeuroML2/NeuroML_v2beta5.xsd" id="TestNetwork">
    <notes>none</notes>
    <network id="TestNetwork">
        <notes>none</notes>
        <population id="pop0" component="cell0" size="5"/>
        <population id="pop2" component="cell1" size="10"/>
    </network>
</neuroml>
